*Heading
** Job name: Job-1sample2 Model name: Model-1
** Generated by: Abaqus/CAE 2017
*Preprint, echo=NO, model=NO, history=NO, contact=NO
**
** PARTS
**
*Part, name=sample2
*End Part
**
**
** ASSEMBLY
**
*Assembly, name=Assembly
**
*Instance, name=sample2-1, part=sample2
*Node
      1,           0.,           0.
      2,          10.,           0.
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*Element, type=CPS4R
    1,     1,     2,   103,   102
    2,     2,     3,   104,   103
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*Nset, nset=Set-1, generate
     1,  10201,      1
*Elset, elset=Set-1, generate
     1,  10000,      1
** Section: Section-1sample1
*Solid Section, elset=Set-1, material=Material-1
,
*End Instance
**
*End Assembly
**
** MATERIALS
**
*Material, name=Material-1
*Elastic
109039.,0.
